##################################################################
# LAMMPS input file generated using pylion 0.5.2
# simulation name: ringsimulation
#
# pylion is written and maintained by Dimitris Trypogeorgos
# and Elliot Bentine. Download it from
# https://bitbucket.org/dtrypogeorgos/pylion
#
# If you find it useful please cite <paper>.
##################################################################


units si
atom_style charge

# Creating simulation box...
boundary m m m
region simulationDomain block -0.01  0.01 -0.01 0.01 -0.01 0.01 units box
create_box 1 simulationDomain

# Configure neighbour list...
neighbor 1 nsq
neigh_modify once yes

# Configure pairwise interactions for long range Coulombics only...
pair_style coul/cut 10
pair_coeff * *

# Placing individual ions...
create_atoms 1 single 0.0 0.0 9.5e-05 units box

# Species...
mass 1 6.642156e-26
set type 1 charge 1.6021764599999998e-19
group 1 type 1

timestep 2.652582384864922e-10

# Configuring additional output to flush buffer during simulation...
thermo 10000
thermo_style custom step cpu
thermo_modify flush yes

# Time integration...
group nonRigidBody union all
fix timeIntegrator nonRigidBody nve


# Creating a point Surface Electrode Trap... (fixID=4435133720704)
variable phase44351337207040		equal "1.884956e+08*step*dt"
variable oscEX4435133720704 atom "(1.487881e-09)*((-3*(x - (-3.035065e-04))*z/sqrt((x - (-3.035065e-04))^2+(y - (9.856663e-05))^2+z^2)^5) + (-3*(x - (-2.987642e-04))*z/sqrt((x - (-2.987642e-04))^2+(y - (1.067805e-04))^2+z^2)^5) + (-3*(x - (-2.940219e-04))*z/sqrt((x - (-2.940219e-04))^2+(y - (1.149944e-04))^2+z^2)^5) + (-3*(x - (-2.892796e-04))*z/sqrt((x - (-2.892796e-04))^2+(y - (1.232083e-04))^2+z^2)^5) + (-3*(x - (-2.845374e-04))*z/sqrt((x - (-2.845374e-04))^2+(y - (1.314222e-04))^2+z^2)^5) + (-3*(x - (-2.797951e-04))*z/sqrt((x - (-2.797951e-04))^2+(y - (1.396361e-04))^2+z^2)^5) + (-3*(x - (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
variable oscEY4435133720704 atom "(1.487881e-09)*((-3*(y - (9.856663e-05))*z/sqrt((x - (-3.035065e-04))^2+(y - (9.856663e-05))^2+z^2)^5) + (-3*(y - (1.067805e-04))*z/sqrt((x - (-2.987642e-04))^2+(y - (1.067805e-04))^2+z^2)^5) + (-3*(y - (1.149944e-04))*z/sqrt((x - (-2.940219e-04))^2+(y - (1.149944e-04))^2+z^2)^5) + (-3*(y - (1.232083e-04))*z/sqrt((x - (-2.892796e-04))^2+(y - (1.232083e-04))^2+z^2)^5) + (-3*(y - (1.314222e-04))*z/sqrt((x - (-2.845374e-04))^2+(y - (1.314222e-04))^2+z^2)^5) + (-3*(y - (1.396361e-04))*z/sqrt((x - (-2.797951e-04))^2+(y - (1.396361e-04))^2+z^2)^5) + (-3*(y - (1.4784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
variable oscEZ4435133720704 atom "(1.487881e-09)*(((x - (-3.035065e-04))^2 + (y - (9.856663e-05))^2 - 2*z^2)/sqrt((x - (-3.035065e-04))^2+(y - (9.856663e-05))^2+z^2)^5 + ((x - (-2.987642e-04))^2 + (y - (1.067805e-04))^2 - 2*z^2)/sqrt((x - (-2.987642e-04))^2+(y - (1.067805e-04))^2+z^2)^5 + ((x - (-2.940219e-04))^2 + (y - (1.149944e-04))^2 - 2*z^2)/sqrt((x - (-2.940219e-04))^2+(y - (1.149944e-04))^2+z^2)^5 + ((x - (-2.892796e-04))^2 + (y - (1.232083e-04))^2 - 2*z^2)/sqrt((x - (-2.892796e-04))^2+(y - (1.232083e-04))^2+z^2)^5 + ((x - (-2.845374e-04))^2 + (y - (1.314222e-04))^2 - 2*z^2)/sqrt((x - (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
fix 4435133720704 all efield v_oscEX4435133720704 v_oscEY4435133720704 v_oscEZ4435133720704


# Adding a langevin bath...
fix 145165065378744 all langevin 0.000000e+00 0.000000e+00 1.000000e-07 1337

dump 4435128943920 all custom 10 posring.txt id x y z


# Run simulation
run 10000
